<?xml version="1.0"?>
<?xml-stylesheet type="text/xsl" href="http://jsbsim.sourceforge.net/JSBSim.xsl"?>
<fdm_config name="StratoFortressH" version="2.0" release="ALPHA"
   xmlns:xsi="http://www.w3.org/2001/XMLSchema-instance"
   xsi:noNamespaceSchemaLocation="http://jsbsim.sourceforge.net/JSBSim.xsd">

	<fileheader>
		<author> Aeromatic v 0.95 </author>
		<filecreationdate>2015-05-05</filecreationdate>
		<version>$Revision: 1.15 $</version>
		<description> Models a StratoFortressH. </description>
	</fileheader>

	<!--
		File:     StratoFortressH.xml

		Inputs:
			name:          StratoFortressH
			type:          four-engine transonic transport
			max weight:    505000 lb
			wing span:     185.00 ft
			length:        160.75 ft
			wing area:     4000 sq-ft
			gear type:     tricycle
			retractable?:  yes
			# engines:     8
			engine type:   turbine
			engine layout: wings
			yaw damper?    no

		Outputs:
			wing loading:  126.25 lb/sq-ft
			payload:       146953.0 lbs
			CL-alpha:      4.4 per radian
			CL-0:          0.2
			CL-max:        1.2
			CD-0:          0.017
		K:             0.042

	-->

	<metrics>
		<wingarea  unit="FT2"> 4000.00 </wingarea>
		<wingspan  unit="FT" >  185.00 </wingspan>
		<wing_incidence>          2.00 </wing_incidence>
		<chord     unit="FT" >   21.62 </chord>
		<htailarea unit="FT2"> 1004.00 </htailarea>
		<htailarm  unit="FT" >   55.00 </htailarm>
		<vtailarea unit="FT2">  451.00 </vtailarea>
		<vtailarm  unit="FT" >   24.34 </vtailarm>
		<location name="AERORP" unit="IN">
			<x> 1269.00 </x>
			<y>   0.00 </y>
			<z>   0.00 </z>
		</location>
		<location name="EYEPOINT" unit="IN">
			<x> 135.03 </x>
			<y> -32.00 </y>
			<z>  80.00 </z>
		</location>
		<location name="VRP" unit="IN">
			<x>0</x>
			<y>0</y>
			<z>-20</z>
		</location>
	</metrics>

	<mass_balance>
		<ixx unit="SLUG*FT2">   3984950 </ixx>
		<iyy unit="SLUG*FT2">   3396560 </iyy>
		<izz unit="SLUG*FT2">   7506536 </izz>
		<emptywt unit="LBS" >    146452 </emptywt>
		<location name="CG" unit="IN">
			<x> 1269.00 </x>
			<y>   0.00 </y>
			<z> -48.22 </z>
		</location>


		<pointmass name="Crew">
			<description>Careful, can be overloaded! Different configurations for different missions!</description>
			<weight unit="LBS"> 1000.0000 </weight>
			<location name="CREW" unit="IN">
				<x>   600.00 </x>
				<y>     0.00 </y>
				<z>   -54.07 </z>
			</location>
		</pointmass>

		<pointmass name="Bomb shaft">
			<description>Careful, can be overloaded! Different configurations for different missions!</description>
			<weight unit="LBS"> 72000.0000 </weight>
			<location name="Tech ops" unit="IN">
				<x>  1269.00 </x>
				<y>     0.00 </y>
				<z>   -54.07 </z>
			</location>
		</pointmass>

		<pointmass name="Pylon left">
			<description>Careful, can be overloaded! Different configurations for different missions!</description>
			<weight unit="LBS"> 19000.0000 </weight>
			<location name="Tech ops" unit="IN">
				<x>  1269.00 </x>
				<y>  -200.00 </y>
				<z>   -54.07 </z>
			</location>
		</pointmass>

		<pointmass name="Pylon right">
			<description>Careful, can be overloaded! Different configurations for different missions!</description>
			<weight unit="LBS"> 19000.0000 </weight>
			<location name="Tech ops" unit="IN">
				<x>  1269.00 </x>
				<y>   200.00 </y>
				<z>   -54.07 </z>
			</location>
		</pointmass>

	</mass_balance>

	<ground_reactions>

		<!-- contact type="BOGEY" name="NOSE">
			<location unit="IN">
				<x> 200.77 </x>
				<y>   0.00 </y>
				<z> -231.48 </z>
			</location>
			<static_friction>  0.80 </static_friction>
			<dynamic_friction> 0.50 </dynamic_friction>
			<rolling_friction> 0.02 </rolling_friction>
			<spring_coeff unit="LBS/FT">      151500.00 </spring_coeff>
			<damping_coeff unit="LBS/FT/SEC"> 100500.00 </damping_coeff>
			<damping_coeff_rebound unit="LBS/FT/SEC">75000</damping_coeff_rebound>
			<max_steer unit="DEG"> 45.00 </max_steer>
			<brake_group>NONE</brake_group>
			<retractable>1</retractable>
		</contact -->

		<contact type="BOGEY" name="LEFT_MAIN1">
			<location unit="IN">
				<x> 319.76 </x>
				<y> -199.80 </y>
				<z> -131.48 </z>
			</location>
			<static_friction>  0.80 </static_friction>
			<dynamic_friction> 0.50 </dynamic_friction>
			<rolling_friction> 0.02 </rolling_friction>
			<spring_coeff unit="LBS/FT">      150000.00 </spring_coeff>
			<damping_coeff unit="LBS/FT/SEC">  80500.00 </damping_coeff>
			<max_steer unit="DEG">45</max_steer>
			<brake_group>LEFT</brake_group>
			<retractable>1</retractable>
		</contact>

		<contact type="BOGEY" name="LEFT_MAIN2">
			<location unit="IN">
				<x> 1319.76 </x>
				<y> -199.80 </y>
				<z> -131.48 </z>
			</location>
			<static_friction>  0.80 </static_friction>
			<dynamic_friction> 0.50 </dynamic_friction>
			<rolling_friction> 0.02 </rolling_friction>
			<spring_coeff unit="LBS/FT">      150000.00 </spring_coeff>
			<damping_coeff unit="LBS/FT/SEC">  80500.00 </damping_coeff>
			<max_steer unit="DEG">0</max_steer>
			<brake_group>LEFT</brake_group>
			<retractable>1</retractable>
		</contact>

		<contact type="BOGEY" name="RIGHT_MAIN1">
			<location unit="IN">
				<x> 319.76 </x>
				<y> 199.80 </y>
				<z> -131.48 </z>
			</location>
			<static_friction>  0.80 </static_friction>
			<dynamic_friction> 0.50 </dynamic_friction>
			<rolling_friction> 0.02 </rolling_friction>
			<spring_coeff unit="LBS/FT">      505000.00 </spring_coeff>
			<damping_coeff unit="LBS/FT/SEC"> 252500.00 </damping_coeff>
			<max_steer unit="DEG">45</max_steer>
			<brake_group>RIGHT</brake_group>
			<retractable>1</retractable>
		</contact>

		<contact type="BOGEY" name="RIGHT_MAIN2">
			<location unit="IN">
				<x> 1319.76 </x>
				<y> 199.80 </y>
				<z> -131.48 </z>
			</location>
			<static_friction>  0.80 </static_friction>
			<dynamic_friction> 0.50 </dynamic_friction>
			<rolling_friction> 0.02 </rolling_friction>
			<spring_coeff unit="LBS/FT">      505000.00 </spring_coeff>
			<damping_coeff unit="LBS/FT/SEC"> 252500.00 </damping_coeff>
			<max_steer unit="DEG">0</max_steer>
			<brake_group>RIGHT</brake_group>
			<retractable>1</retractable>
		</contact>

		<contact type="STRUCTURE" name="LEFT_WING">
			<location unit="IN">
				<x> 1269.00 </x>
				<y> -92.50 </y>
				<z> -48.22 </z>
			</location>
			<static_friction>  1.00 </static_friction>
			<dynamic_friction> 1.00 </dynamic_friction>
			<spring_coeff unit="LBS/FT">      505000.00 </spring_coeff>
			<damping_coeff unit="LBS/FT/SEC"> 505000.00 </damping_coeff>
		</contact>

		<contact type="STRUCTURE" name="RIGHT_WING">
			<location unit="IN">
				<x> 1269.00 </x>
				<y>  92.50 </y>
				<z> -48.22 </z>
			</location>
			<static_friction>  1.00 </static_friction>
			<dynamic_friction> 1.00 </dynamic_friction>
			<spring_coeff unit="LBS/FT">      505000.00 </spring_coeff>
			<damping_coeff unit="LBS/FT/SEC"> 505000.00 </damping_coeff>
		</contact>

	</ground_reactions>

	<propulsion>

		<engine file="JT3D-P3">
			<location unit="IN">
				<x> 1269.00 </x>
				<y> -370.00 </y>
				<z> -40.00 </z>
			</location>
			<orient unit="DEG">
				<pitch> 0.00 </pitch>
				<roll>  0.00 </roll>
				<yaw>   0.00 </yaw>
			</orient>
			<feed>3</feed>
			<feed>4</feed>
			<feed>5</feed>
			<feed>6</feed>
			<feed>0</feed>
			<feed>1</feed>
			<feed>2</feed>
			<thruster file="direct">
				<location unit="IN">
					<x> 1269.00 </x>
					<y> -370.00 </y>
					<z> -40.00 </z>
				</location>
				<orient unit="DEG">
					<pitch> 0.00 </pitch>
					<roll>  0.00 </roll>
					<yaw>   0.00 </yaw>
				</orient>
			</thruster>
		</engine>

		<engine file="JT3D-P3">
			<location unit="IN">
				<x> 1269.00 </x>
				<y> -370.00 </y>
				<z> -40.00 </z>
			</location>
			<orient unit="DEG">
				<pitch> 0.00 </pitch>
				<roll>  0.00 </roll>
				<yaw>   0.00 </yaw>
			</orient>
			<feed>3</feed>
			<feed>4</feed>
			<feed>5</feed>
			<feed>6</feed>
			<feed>0</feed>
			<feed>1</feed>
			<feed>2</feed>
			<thruster file="direct">
				<location unit="IN">
					<x> 1269.00 </x>
					<y> -370.00 </y>
					<z> -40.00 </z>
				</location>
				<orient unit="DEG">
					<pitch> 0.00 </pitch>
					<roll>  0.00 </roll>
					<yaw>   0.00 </yaw>
				</orient>
			</thruster>
		</engine>

		<engine file="JT3D-P3">
			<location unit="IN">
				<x> 1269.00 </x>
				<y> -370.00 </y>
				<z> -40.00 </z>
			</location>
			<orient unit="DEG">
				<pitch> 0.00 </pitch>
				<roll>  0.00 </roll>
				<yaw>   0.00 </yaw>
			</orient>
			<feed>3</feed>
			<feed>4</feed>
			<feed>5</feed>
			<feed>6</feed>
			<feed>0</feed>
			<feed>1</feed>
			<feed>2</feed>
			<thruster file="direct">
				<location unit="IN">
					<x> 1269.00 </x>
					<y> -370.00 </y>
					<z> -40.00 </z>
				</location>
				<orient unit="DEG">
					<pitch> 0.00 </pitch>
					<roll>  0.00 </roll>
					<yaw>   0.00 </yaw>
				</orient>
			</thruster>
		</engine>

		<engine file="JT3D-P3">
			<location unit="IN">
				<x> 1269.00 </x>
				<y> -370.00 </y>
				<z> -40.00 </z>
			</location>
			<orient unit="DEG">
				<pitch> 0.00 </pitch>
				<roll>  0.00 </roll>
				<yaw>   0.00 </yaw>
			</orient>
			<feed>3</feed>
			<feed>4</feed>
			<feed>5</feed>
			<feed>6</feed>
			<feed>0</feed>
			<feed>1</feed>
			<feed>2</feed>
			<thruster file="direct">
				<location unit="IN">
					<x> 1269.00 </x>
					<y> -370.00 </y>
					<z> -40.00 </z>
				</location>
				<orient unit="DEG">
					<pitch> 0.00 </pitch>
					<roll>  0.00 </roll>
					<yaw>   0.00 </yaw>
				</orient>
			</thruster>
		</engine>

		<engine file="JT3D-P3">
			<location unit="IN">
				<x> 1269.00 </x>
				<y> 370.00 </y>
				<z> -40.00 </z>
			</location>
			<orient unit="DEG">
				<pitch> 0.00 </pitch>
				<roll>  0.00 </roll>
				<yaw>   0.00 </yaw>
			</orient>
			<feed>3</feed>
			<feed>4</feed>
			<feed>5</feed>
			<feed>6</feed>
			<feed>9</feed>
			<feed>8</feed>
			<feed>7</feed>
			<thruster file="direct">
				<location unit="IN">
					<x> 1269.00 </x>
					<y> 370.00 </y>
					<z> -40.00 </z>
				</location>
				<orient unit="DEG">
					<pitch> 0.00 </pitch>
					<roll>  0.00 </roll>
					<yaw>   0.00 </yaw>
				</orient>
			</thruster>
		</engine>

		<engine file="JT3D-P3">
			<location unit="IN">
				<x> 1269.00 </x>
				<y> 370.00 </y>
				<z> -40.00 </z>
			</location>
			<orient unit="DEG">
				<pitch> 0.00 </pitch>
				<roll>  0.00 </roll>
				<yaw>   0.00 </yaw>
			</orient>
			<feed>3</feed>
			<feed>4</feed>
			<feed>5</feed>
			<feed>6</feed>
			<feed>9</feed>
			<feed>8</feed>
			<feed>7</feed>
			<thruster file="direct">
				<location unit="IN">
					<x> 1269.00 </x>
					<y> 370.00 </y>
					<z> -40.00 </z>
				</location>
				<orient unit="DEG">
					<pitch> 0.00 </pitch>
					<roll>  0.00 </roll>
					<yaw>   0.00 </yaw>
				</orient>
			</thruster>
		</engine>

		<engine file="JT3D-P3">
			<location unit="IN">
				<x> 1269.00 </x>
				<y> 370.00 </y>
				<z> -40.00 </z>
			</location>
			<orient unit="DEG">
				<pitch> 0.00 </pitch>
				<roll>  0.00 </roll>
				<yaw>   0.00 </yaw>
			</orient>
			<feed>3</feed>
			<feed>4</feed>
			<feed>5</feed>
			<feed>6</feed>
			<feed>9</feed>
			<feed>8</feed>
			<feed>7</feed>
			<thruster file="direct">
				<location unit="IN">
					<x> 1269.00 </x>
					<y> 370.00 </y>
					<z> -40.00 </z>
				</location>
				<orient unit="DEG">
					<pitch> 0.00 </pitch>
					<roll>  0.00 </roll>
					<yaw>   0.00 </yaw>
				</orient>
			</thruster>
		</engine>

		<engine file="JT3D-P3">
			<location unit="IN">
				<x> 1269.00 </x>
				<y> 370.00 </y>
				<z> -40.00 </z>
			</location>
			<orient unit="DEG">
				<pitch> 0.00 </pitch>
				<roll>  0.00 </roll>
				<yaw>   0.00 </yaw>
			</orient>
			<feed>3</feed>
			<feed>4</feed>
			<feed>5</feed>
			<feed>6</feed>
			<feed>9</feed>
			<feed>8</feed>
			<feed>7</feed>
			<thruster file="direct">
				<location unit="IN">
					<x> 1269.00 </x>
					<y> 370.00 </y>
					<z> -40.00 </z>
				</location>
				<orient unit="DEG">
					<pitch> 0.00 </pitch>
					<roll>  0.00 </roll>
					<yaw>   0.00 </yaw>
				</orient>
			</thruster>
		</engine>

		<tank type="FUEL" number="0">
			<location unit="IN">
				<x> 1269.00 </x>
				<y> -900.00 </y>
				<z> -48.22 </z>
			</location>
			<priority>2</priority>
			<capacity unit="LBS"> 28510.56 </capacity>
			<contents unit="LBS"> 11755.28 </contents>
		</tank>

		<tank type="FUEL" number="1">
			<location unit="IN">
				<x> 1269.00 </x>
				<y> -600.00 </y>
				<z> -48.22 </z>
			</location>
			<priority>2</priority>
			<capacity unit="LBS"> 32510.56 </capacity>
			<contents unit="LBS"> 11755.28 </contents>
		</tank>

		<tank type="FUEL" number="2">
			<location unit="IN">
				<x> 1269.00 </x>
				<y> -300.00 </y>
				<z> -48.22 </z>
			</location>
			<priority>2</priority>
			<capacity unit="LBS"> 37510.56 </capacity>
			<contents unit="LBS"> 11755.28 </contents>
		</tank>

		<tank type="FUEL" number="3">
			<location unit="IN">
				<x> 1269.00 </x>
				<y>   0.00 </y>
				<z> -48.22 </z>
			</location>
			<priority>1</priority>
			<capacity unit="LBS"> 33510.56 </capacity>
			<contents unit="LBS"> 11755.28 </contents>
		</tank>

		<tank type="FUEL" number="4">
			<location unit="IN">
				<x> 1269.00 </x>
				<y>   0.00 </y>
				<z> -48.22 </z>
			</location>
			<priority>1</priority>
			<capacity unit="LBS"> 33510.56 </capacity>
			<contents unit="LBS"> 11755.28 </contents>
		</tank>

		<tank type="FUEL" number="5">
			<location unit="IN">
				<x> 1269.00 </x>
				<y>   0.00 </y>
				<z> -48.22 </z>
			</location>
			<priority>1</priority>
			<capacity unit="LBS"> 33510.56 </capacity>
			<contents unit="LBS"> 11755.28 </contents>
		</tank>

		<tank type="FUEL" number="6">
			<location unit="IN">
				<x> 1269.00 </x>
				<y>   0.00 </y>
				<z> -48.22 </z>
			</location>
			<priority>1</priority>
			<capacity unit="LBS"> 33510.56 </capacity>
			<contents unit="LBS"> 11755.28 </contents>
		</tank>

		<tank type="FUEL" number="7">
			<location unit="IN">
				<x> 1269.00 </x>
				<y> 300.00 </y>
				<z> -48.22 </z>
			</location>
			<priority>2</priority>
			<capacity unit="LBS"> 37510.56 </capacity>
			<contents unit="LBS"> 11755.28 </contents>
		</tank>

		<tank type="FUEL" number="8">
			<location unit="IN">
				<x> 1269.00 </x>
				<y> 600.00 </y>
				<z> -48.22 </z>
			</location>
			<priority>2</priority>
			<capacity unit="LBS"> 32510.56 </capacity>
			<contents unit="LBS"> 11755.28 </contents>
		</tank>

		<tank type="FUEL" number="9">
			<location unit="IN">
				<x> 1269.00 </x>
				<y> 900.00 </y>
				<z> -48.22 </z>
			</location>
			<priority>2</priority>
			<capacity unit="LBS"> 29510.56 </capacity>
			<contents unit="LBS"> 11755.28 </contents>
		</tank>

	</propulsion>

	<flight_control name="FCS: StratoFortressH">

		<channel name="Pitch">

			<summer name="Pitch Trim Sum">
				<input>fcs/elevator-cmd-norm</input>
				<input>fcs/pitch-trim-cmd-norm</input>
				<clipto>
					<min> -1 </min>
					<max>  1 </max>
				</clipto>
			</summer>

			<aerosurface_scale name="Elevator Control">
				<input>fcs/pitch-trim-sum</input>
				<range>
					<min> -0.35 </min>
					<max>  0.35 </max>
				</range>
				<output>fcs/elevator-pos-rad</output>
			</aerosurface_scale>

			<aerosurface_scale name="elevator normalization">
				<input>fcs/elevator-pos-rad</input>
				<domain>
					<min> -0.35 </min>
					<max>  0.35 </max>
				</domain>
				<range>
					<min> -1 </min>
					<max>  1 </max>
				</range>
				<output>fcs/elevator-pos-norm</output>
			</aerosurface_scale>

		</channel>

		<channel name="Roll">

			<summer name="Roll Trim Sum">
				<input>fcs/aileron-cmd-norm</input>
				<input>fcs/roll-trim-cmd-norm</input>
				<clipto>
					<min> -1 </min>
					<max>  1 </max>
				</clipto>
			</summer>

			<aerosurface_scale name="Left Aileron Control">
				<input>fcs/roll-trim-sum</input>
				<range>
					<min> -0.35 </min>
					<max>  0.35 </max>
				</range>
				<output>fcs/left-aileron-pos-rad</output>
			</aerosurface_scale>

			<aerosurface_scale name="Right Aileron Control">
				<input>fcs/roll-trim-sum</input>
				<range>
					<min> -0.35 </min>
					<max>  0.35 </max>
				</range>
				<output>fcs/right-aileron-pos-rad</output>
			</aerosurface_scale>

			<aerosurface_scale name="left aileron normalization">
				<input>fcs/left-aileron-pos-rad</input>
				<domain>
					<min> -0.35 </min>
					<max>  0.35 </max>
				</domain>
				<range>
					<min> -1 </min>
					<max>  1 </max>
				</range>
				<output>fcs/left-aileron-pos-norm</output>
			</aerosurface_scale>

			<aerosurface_scale name="right aileron normalization">
				<input>fcs/right-aileron-pos-rad</input>
				<domain>
					<min> -0.35 </min>
					<max>  0.35 </max>
				</domain>
				<range>
					<min> -1 </min>
					<max>  1 </max>
				</range>
				<output>fcs/right-aileron-pos-norm</output>
			</aerosurface_scale>

		</channel>

		<channel name="Yaw">

			<summer name="Rudder Command Sum">
				<input>fcs/rudder-cmd-norm</input>
				<input>fcs/yaw-trim-cmd-norm</input>
				<clipto>
					<min> -1 </min>
					<max>  1 </max>
				</clipto>
			</summer>

			<aerosurface_scale name="Rudder Control">
				<input>fcs/rudder-command-sum</input>
				<range>
					<min> -0.35 </min>
					<max>  0.35 </max>
				</range>
				<output>fcs/rudder-pos-rad</output>
			</aerosurface_scale>

			<aerosurface_scale name="rudder normalization">
				<input>fcs/rudder-pos-rad</input>
				<domain>
					<min> -0.35 </min>
					<max>  0.35 </max>
				</domain>
				<range>
					<min> -1 </min>
					<max>  1 </max>
				</range>
				<output>fcs/rudder-pos-norm</output>
			</aerosurface_scale>

		</channel>

		<channel name="Flaps">

			<kinematic name="Flaps Control">
				<input>fcs/flap-cmd-norm</input>
				<traverse>
					<setting>
						<position>  0 </position>
						<time>      0 </time>
					</setting>
					<setting>
						<position> 35 </position>
						<time>     60 </time>
					</setting>
				</traverse>
				<output>fcs/flap-pos-deg</output>
			</kinematic>

			<aerosurface_scale name="flap normalization">
				<input>fcs/flap-pos-deg</input>
				<domain>
					<min>  0 </min>
					<max> 30 </max>
				</domain>
				<range>
					<min> 0 </min>
					<max> 1 </max>
				</range>
				<output>fcs/flap-pos-norm</output>
			</aerosurface_scale>

		</channel>

		<channel name="Landing Gear">

			<kinematic name="Gear Control">
				<input>gear/gear-cmd-norm</input>
				<traverse>
					<setting>
						<position> 0 </position>
						<time>     0 </time>
					</setting>
					<setting>
						<position> 1 </position>
						<time>     5 </time>
					</setting>
				</traverse>
				<output>gear/gear-pos-norm</output>
			</kinematic>

		</channel>

		<channel name="Speedbrake">

			<kinematic name="Speedbrake Control">
				<input>fcs/speedbrake-cmd-norm</input>
				<traverse>
					<setting>
						<position> 0 </position>
						<time>     0 </time>
					</setting>
					<setting>
						<position> 1 </position>
						<time>     1 </time>
					</setting>
				</traverse>
				<output>fcs/speedbrake-pos-norm</output>
			</kinematic>

		</channel>

	</flight_control>

	<aerodynamics>

		<axis name="LIFT">

			<function name="aero/force/Lift_alpha">
				<description>Lift due to alpha</description>
				<product>
					<property>aero/qbar-psf</property>
					<property>metrics/Sw-sqft</property>
					<table>
						<independentVar lookup="row">aero/alpha-rad</independentVar>
						<tableData>
							-0.20 -0.600
							 0.00  0.440
							 0.23  1.340
							 0.60  0.780
						</tableData>
					</table>
				</product>
			</function>

			<function name="aero/force/Lift_flap">
				<description>Delta Lift due to flaps</description>
				<product>
					<property>aero/qbar-psf</property>
					<property>metrics/Sw-sqft</property>
					<property>fcs/flap-pos-deg</property>
					<value> 0.02000 </value>
				</product>
			</function>

			<function name="aero/force/Lift_speedbrake">
				<description>Delta Lift due to speedbrake</description>
				<product>
					<property>aero/qbar-psf</property>
					<property>metrics/Sw-sqft</property>
					<property>fcs/speedbrake-pos-norm</property>
					<value>-0.08</value>
				</product>
			</function>

			<function name="aero/force/Lift_elevator">
				<description>Lift due to Elevator Deflection</description>
				<product>
					<property>aero/qbar-psf</property>
					<property>metrics/Sw-sqft</property>
					<property>fcs/elevator-pos-rad</property>
					<value>0.20</value>
				</product>
			</function>

		</axis>

		<axis name="DRAG">

			<function name="aero/force/Drag_basic">
				<description>Drag at zero lift</description>
				<product>
					<property>aero/qbar-psf</property>
					<property>metrics/Sw-sqft</property>
					<table>
						<independentVar lookup="row">aero/alpha-rad</independentVar>
						<tableData>
							-1.57    1.550
							-0.26    0.072
							 0.00    0.067
							 0.26    0.072
							 1.57    1.550
						</tableData>
					</table>
				</product>
			</function>

			<function name="aero/force/Drag_induced">
				<description>Induced drag</description>
				<product>
					<property>aero/qbar-psf</property>
					<property>metrics/Sw-sqft</property>
					<property>aero/cl-squared</property>
					<value>0.042</value>
				</product>
			</function>

			<function name="aero/force/Drag_mach">
				<description>Drag due to mach</description>
				<product>
					<property>aero/qbar-psf</property>
					<property>metrics/Sw-sqft</property>
					<table>
						<independentVar lookup="row">velocities/mach</independentVar>
						<tableData>
							 0.00      0.000
							 0.79      0.000
							 1.10      0.023
							 1.80      0.015
						</tableData>
					</table>
				</product>
			</function>

			<function name="aero/force/Drag_flap">
				<description>Drag due to flaps</description>
				<product>
					<property>aero/qbar-psf</property>
					<property>metrics/Sw-sqft</property>
					<property>fcs/flap-pos-deg</property>
					<value> 0.00350 </value>
				</product>
			</function>

			<function name="aero/force/Drag_gear">
				<description>Drag due to gear</description>
				<product>
					<property>aero/qbar-psf</property>
					<property>metrics/Sw-sqft</property>
					<property>gear/gear-pos-norm</property>
					<value>0.015</value>
				</product>
			</function>

			<function name="aero/force/Drag_speedbrake">
				<description>Drag due to speedbrakes</description>
				<product>
					<property>aero/qbar-psf</property>
					<property>metrics/Sw-sqft</property>
					<property>fcs/speedbrake-pos-norm</property>
					<value>0.017</value>
				</product>
			</function>

			<function name="aero/force/Drag_beta">
				<description>Drag due to sideslip</description>
				<product>
					<property>aero/qbar-psf</property>
					<property>metrics/Sw-sqft</property>
					<table>
						<independentVar lookup="row">aero/beta-rad</independentVar>
						<tableData>
							-1.57    1.230
							-0.26    0.050
							 0.00    0.000
							 0.26    0.050
							 1.57    1.230
						</tableData>
					</table>
				</product>
			</function>

			<function name="aero/force/Drag_elevator">
				<description>Drag due to Elevator Deflection</description>
				<product>
					<property>aero/qbar-psf</property>
					<property>metrics/Sw-sqft</property>
					<abs>
						<property>fcs/elevator-pos-norm</property>
					</abs>
					<value>0.04</value>
				</product>
			</function>

		</axis>

		<axis name="SIDE">

			<function name="aero/force/Side_beta">
				<description>Side force due to beta</description>
				<product>
					<property>aero/qbar-psf</property>
					<property>metrics/Sw-sqft</property>
					<property>aero/beta-rad</property>
					<value>-1</value>
				</product>
			</function>

		</axis>

		<axis name="ROLL">

			<function name="aero/moment/Roll_beta">
				<description>Roll moment due to beta</description>
				<product>
					<property>aero/qbar-psf</property>
					<property>metrics/Sw-sqft</property>
					<property>metrics/bw-ft</property>
					<property>aero/beta-rad</property>
					<value>-0.1</value>
				</product>
			</function>

			<function name="aero/moment/Roll_damp">
				<description>Roll moment due to roll rate</description>
				<product>
					<property>aero/qbar-psf</property>
					<property>metrics/Sw-sqft</property>
					<property>metrics/bw-ft</property>
					<property>aero/bi2vel</property>
					<property>velocities/p-aero-rad_sec</property>
					<value>-0.4</value>
				</product>
			</function>

			<function name="aero/moment/Roll_yaw">
				<description>Roll moment due to yaw rate</description>
				<product>
					<property>aero/qbar-psf</property>
					<property>metrics/Sw-sqft</property>
					<property>metrics/bw-ft</property>
					<property>aero/bi2vel</property>
					<property>velocities/r-aero-rad_sec</property>
					<value>0.15</value>
				</product>
			</function>

			<function name="aero/moment/Roll_aileron">
				<description>Roll moment due to aileron</description>
				<product>
					<property>aero/qbar-psf</property>
					<property>metrics/Sw-sqft</property>
					<property>metrics/bw-ft</property>
					<property>fcs/left-aileron-pos-rad</property>
					<value>0.1</value>
				</product>
			</function>

			<function name="aero/moment/Roll_rudder">
				<description>Roll moment due to rudder</description>
				<product>
					<property>aero/qbar-psf</property>
					<property>metrics/Sw-sqft</property>
					<property>metrics/bw-ft</property>
					<property>fcs/rudder-pos-rad</property>
					<value>0.01</value>
				</product>
			</function>

		</axis>

		<axis name="PITCH">

			<function name="aero/moment/Pitch_alpha">
				<description>Pitch moment due to alpha</description>
				<product>
					<property>aero/qbar-psf</property>
					<property>metrics/Sw-sqft</property>
					<property>metrics/cbarw-ft</property>
					<property>aero/alpha-rad</property>
					<value>-0.7</value>
				</product>
			</function>

			<function name="aero/moment/Pitch_elevator">
				<description>Pitch moment due to elevator</description>
				<product>
					<property>aero/qbar-psf</property>
					<property>metrics/Sw-sqft</property>
					<property>metrics/cbarw-ft</property>
					<property>fcs/elevator-pos-rad</property>
					<table>
						<independentVar lookup="row">velocities/mach</independentVar>
						<tableData>
							 0.0     -1.300
							 2.0     -0.325
						</tableData>
					</table>
				</product>
			</function>

			<function name="aero/moment/Pitch_damp">
				<description>Pitch moment due to pitch rate</description>
				<product>
					<property>aero/qbar-psf</property>
					<property>metrics/Sw-sqft</property>
					<property>metrics/cbarw-ft</property>
					<property>aero/ci2vel</property>
					<property>velocities/q-aero-rad_sec</property>
					<value>-21</value>
				</product>
			</function>

			<function name="aero/moment/Pitch_alphadot">
				<description>Pitch moment due to alpha rate</description>
				<product>
					<property>aero/qbar-psf</property>
					<property>metrics/Sw-sqft</property>
					<property>metrics/cbarw-ft</property>
					<property>aero/ci2vel</property>
					<property>aero/alphadot-rad_sec</property>
					<value>-4</value>
				</product>
			</function>

		</axis>

		<axis name="YAW">

			<function name="aero/moment/Yaw_beta">
				<description>Yaw moment due to beta</description>
				<product>
					<property>aero/qbar-psf</property>
					<property>metrics/Sw-sqft</property>
					<property>metrics/bw-ft</property>
					<property>aero/beta-rad</property>
					<value>0.12</value>
				</product>
			</function>

			<function name="aero/moment/Yaw_damp">
				<description>Yaw moment due to yaw rate</description>
				<product>
					<property>aero/qbar-psf</property>
					<property>metrics/Sw-sqft</property>
					<property>metrics/bw-ft</property>
					<property>aero/bi2vel</property>
					<property>velocities/r-aero-rad_sec</property>
					<value>-0.15</value>
				</product>
			</function>

			<function name="aero/moment/Yaw_rudder">
				<description>Yaw moment due to rudder</description>
				<product>
					<property>aero/qbar-psf</property>
					<property>metrics/Sw-sqft</property>
					<property>metrics/bw-ft</property>
					<property>fcs/rudder-pos-rad</property>
					<value>-0.1</value>
				</product>
			</function>

			<function name="aero/moment/Yaw_aileron">
				<description>Adverse yaw</description>
				<product>
					<property>aero/qbar-psf</property>
					<property>metrics/Sw-sqft</property>
					<property>metrics/bw-ft</property>
					<property>fcs/left-aileron-pos-rad</property>
					<value>0</value>
				</product>
			</function>

		</axis>

	</aerodynamics>

	<external_reactions>

		<force name="parachute" frame="WIND">

			<function>
				<product>
					<property> aero/qbar-psf </property>
					<property> /instrumentation/doors/passenger</property>
					<value> 1.0 </value>  <!--Full drag coefficient -->
					<value> 450.00 </value> <!--Full parachute area -->
				</product>
			</function>

			<!--
				The location below is in structural frame (x positive aft), so this location describes a point 1 foot aft of the origin. In 					this case, the origin is the center.
			-->
			<location unit="FT">
				<x>1</x>
				<y>0</y>
				<z>0</z>
			</location>

			<!--
				The direction describes a unit vector. In this case, since the selected frame is the WIND frame, the "-1" x component
				describes a direction exactly opposite of the direction into the wind vector. That is, the direction specified below
				is the direction that the drag force acts in.
			-->
			<direction>
				<x>-1</x>
				<y>0</y>
				<z>0</z>
			</direction>
		</force>

	</external_reactions>

</fdm_config>
